# R-operators
V(x, y) := x + y + sqrt(x^2 + y^2)
Λ(x, y) := -V(-x, -y)
band(a, x) := 1/(2*a)*(a^2 - x^2)
line(a, b, c, x, y) := (a*x + b*y + c)/sqrt(a^2 + b^2)
# Geometry
L := 1
H := L/2
L' := L/L
H' := H/L
ω_C(X, Y) := Λ(band(L'/2, X), H'/2 - Y)
ω_H(X, Y) := Y + H'/2
# (dimensionless)
ω(X, Y) := Λ(ω_C(X, Y), ω_H(X, Y))
T_C := 0
T_H := 1
F(x, y) := (ω_C(x, y)*T_H + ω_H(x, y)*T_C)/(ω_C(x, y) + ω_H(x, y))
# [component: inputs F]
# [component: inputs ω_C, ω_H]
# Visualization mesh
Nx := 64
hx := L'/Nx
i := 0 .. Nx
X[i] := i*hx - L'/2
# [component: inputs ω]
Ny := 2*Nx/2
hy := H'/Ny
j := 0 .. Ny
Y[j] := j*hy - H'/2
G[i, j] := ω(X[i], Y[j])
w[i, j] := G[i, j] ≥ 0
Ω[i, j] := w[i, j]*G[i, j]
# [component: inputs Ω]
# -----------------------------------------------------------------------------------------------------------------------------------------------------------------
# Basic functions
M := 3
N := (M^2 + 3*M)/2
q := 0 .. N
s := 0 .. N
p := 0 .. N
r := 0 .. N
J1[q] := ceil((sqrt(2 + 8*q) - 3)/2)
J[q] := q - J1[q]*(J1[q] + 1)/2
I[q] := J1[q] - J[q]
Po(q, x, y) := x^I[q]*y^J[q]
Q(q, X, Y) := ω(X, Y)*Po(q, X, Y)
Q2(q, X, Y) := ω(X, Y)^2*Po(q, X, Y)
# Laplace operator
Δx := 0.001*L'
Δy := 0.001*H'
Q_x(Q, q, x, y, Δx) := (Q(q, x + Δx, y) - Q(q, x - Δx, y))/(2*Δx)
Q_y(Q, q, x, y, Δy) := (Q(q, x, y + Δy) - Q(q, x, y - Δy))/(2*Δy)
ΔQ(Q, q, x, y, Δx, Δy) := (Q(q, x + Δx, y) + Q(q, x - Δx, y))/Δx^2 + (Q(q, x, y + Δy) + Q(q, x, y - Δy))/Δy^2 - 2*(1/Δx^2 + 1/Δy^2)*Q(q, x, y)
Q1(q, X, Y) := ΔQ(Q2, q, X, Y, Δx, Δy)
# [component: inputs F]
Δf(f, x, y, Δx, Δy) := (f(x + Δx, y) + f(x - Δx, y))/Δx^2 + (f(x, y + Δy) + f(x, y - Δy))/Δy^2 - 2*(1/Δx^2 + 1/Δy^2)*f(x, y)
P[i, j] := w[i, j]*Δf(F, X[i], Y[j], Δx, Δy)
U[i, j] := w[i, j]*F(X[i], Y[j])
f_x(f, x, y, Δx) := (f(x + Δx, y) - f(x - Δx, y))/(2*Δx)
f_y(f, x, y, Δy) := (f(x, y + Δy) - f(x, y - Δy))/(2*Δy)
Ux[i, j] := w[i, j]*f_x(F, X[i], Y[j], Δx)
Uy[i, j] := w[i, j]*f_y(F, X[i], Y[j], Δy)
D_Q(ω, Q, q, x, y, Δx, Δy) := Q_x(Q, q, x, y, Δx)*f_x(ω, x, y, Δx) + Q_y(Q, q, x, y, Δy)*f_y(ω, x, y, Δy)
D_f(ω, f, x, y, Δx, Δy) := f_x(f, x, y, Δx)*f_x(ω, x, y, Δx) + f_y(f, x, y, Δy)*f_y(ω, x, y, Δy)
# 2D integration
Intg(f, Nx, Ny, hx, hy) := 2*hx*hy/3*sum(sum(f[2*i, 2*j + 1] + f[2*i + 2, 2*j + 1] + f[2*i + 1, 2*j] + f[2*i + 1, 2*j + 2] + 2*f[2*i + 1, 2*j + 1], j = 0 .. floor(Ny*2^-1) - 1), i = 0 .. floor(Nx*2^-1) - 1)
Z :=
    for i ∈ 0 .. Nx
        for j ∈ 0 .. Ny
            z0[i, j] ← w[i, j]*Q(0, X[i], Y[j])
    for q ∈ 1 .. N
        for i ∈ 0 .. Nx
            for j ∈ 0 .. Ny
                z[i, j] ← w[i, j]*Q(q, X[i], Y[j])
        z0 ← augment(z0, z)
    z0
ΔZ :=
    for i ∈ 0 .. Nx
        for j ∈ 0 .. Ny
            z0[i, j] ← w[i, j]*ΔQ(Q, 0, X[i], Y[j], Δx, Δy)
    for q ∈ 1 .. N
        for i ∈ 0 .. Nx
            for j ∈ 0 .. Ny
                z[i, j] ← w[i, j]*ΔQ(Q, q, X[i], Y[j], Δx, Δy)
        z0 ← augment(z0, z)
    z0
A :=
    for q ∈ 0 .. N
        for s ∈ 0 .. N
            for i ∈ 0 .. Nx
                for j ∈ 0 .. Ny
                    f[i, j] ← ΔZ[i, j + q*(Ny + 1)]*Z[i, j + s*(Ny + 1)]
            a[q, s] ← Intg(f, Nx, Ny, hx, hy)
    a
B :=
    for q ∈ 0 .. N
        for i ∈ 0 .. Nx
            for j ∈ 0 .. Ny
                f[i, j] ← Z[i, j + q*(Ny + 1)]*P[i, j]
        b[q] ← Intg(f, Nx, Ny, hx, hy)
    -b
h := lsolve(A, B)
θ[i, j] := (sum(h[q]*Z[i, j + q*(Ny + 1)], q) + U[i, j])*(T_H - T_C) + T_C
# [component: inputs θ]
Zx :=
    for i ∈ 0 .. Nx
        for j ∈ 0 .. Ny
            z0[i, j] ← w[i, j]*Q_x(Q, 0, X[i], Y[j], Δx)
    for q ∈ 1 .. N
        for i ∈ 0 .. Nx
            for j ∈ 0 .. Ny
                z[i, j] ← w[i, j]*Q_x(Q, q, X[i], Y[j], Δx)
        z0 ← augment(z0, z)
    z0
Zy :=
    for i ∈ 0 .. Nx
        for j ∈ 0 .. Ny
            z0[i, j] ← w[i, j]*Q_y(Q, 0, X[i], Y[j], Δy)
    for q ∈ 1 .. N
        for i ∈ 0 .. Nx
            for j ∈ 0 .. Ny
                z[i, j] ← w[i, j]*Q_y(Q, q, X[i], Y[j], Δy)
        z0 ← augment(z0, z)
    z0
Z1 :=
    for i ∈ 0 .. Nx
        for j ∈ 0 .. Ny
            z0[i, j] ← w[i, j]*Q1(0, X[i], Y[j])
    for q ∈ 1 .. N
        for i ∈ 0 .. Nx
            for j ∈ 0 .. Ny
                z[i, j] ← w[i, j]*Q1(q, X[i], Y[j])
        z0 ← augment(z0, z)
    z0
ΔZ1 :=
    for i ∈ 0 .. Nx
        for j ∈ 0 .. Ny
            z0[i, j] ← w[i, j]*ΔQ(Q1, 0, X[i], Y[j], Δx, Δy)
    for q ∈ 1 .. N
        for i ∈ 0 .. Nx
            for j ∈ 0 .. Ny
                z[i, j] ← w[i, j]*ΔQ(Q1, q, X[i], Y[j], Δx, Δy)
        z0 ← augment(z0, z)
    z0
Z2 :=
    for i ∈ 0 .. Nx
        for j ∈ 0 .. Ny
            z0[i, j] ← w[i, j]*Q2(0, X[i], Y[j])
    for q ∈ 1 .. N
        for i ∈ 0 .. Nx
            for j ∈ 0 .. Ny
                z[i, j] ← w[i, j]*Q2(q, X[i], Y[j])
        z0 ← augment(z0, z)
    z0
Z1x :=
    for i ∈ 0 .. Nx
        for j ∈ 0 .. Ny
            z0[i, j] ← w[i, j]*Q_x(Q1, 0, X[i], Y[j], Δx)
    for q ∈ 1 .. N
        for i ∈ 0 .. Nx
            for j ∈ 0 .. Ny
                z[i, j] ← w[i, j]*Q_x(Q1, q, X[i], Y[j], Δx)
        z0 ← augment(z0, z)
    z0
Z1y :=
    for i ∈ 0 .. Nx
        for j ∈ 0 .. Ny
            z0[i, j] ← w[i, j]*Q_y(Q1, 0, X[i], Y[j], Δy)
    for q ∈ 1 .. N
        for i ∈ 0 .. Nx
            for j ∈ 0 .. Ny
                z[i, j] ← w[i, j]*Q_y(Q1, q, X[i], Y[j], Δy)
        z0 ← augment(z0, z)
    z0
Z2x :=
    for i ∈ 0 .. Nx
        for j ∈ 0 .. Ny
            z0[i, j] ← w[i, j]*Q_x(Q2, 0, X[i], Y[j], Δx)
    for q ∈ 1 .. N
        for i ∈ 0 .. Nx
            for j ∈ 0 .. Ny
                z[i, j] ← w[i, j]*Q_x(Q2, q, X[i], Y[j], Δx)
        z0 ← augment(z0, z)
    z0
Z2y :=
    for i ∈ 0 .. Nx
        for j ∈ 0 .. Ny
            z0[i, j] ← w[i, j]*Q_y(Q2, 0, X[i], Y[j], Δy)
    for q ∈ 1 .. N
        for i ∈ 0 .. Nx
            for j ∈ 0 .. Ny
                z[i, j] ← w[i, j]*Q_y(Q2, q, X[i], Y[j], Δy)
        z0 ← augment(z0, z)
    z0
ZxZ :=
    for q ∈ 0 .. N
        for p ∈ 0 .. N
            for i ∈ 0 .. Nx
                for j ∈ 0 .. Ny
                    f[i, j] ← Zx[i, j + q*(Ny + 1)]*Z[i, j + p*(Ny + 1)]
            a[q, p] ← Intg(f, Nx, Ny, hx, hy)
    a
ZyZ :=
    for q ∈ 0 .. N
        for p ∈ 0 .. N
            for i ∈ 0 .. Nx
                for j ∈ 0 .. Ny
                    f[i, j] ← Zy[i, j + q*(Ny + 1)]*Z[i, j + p*(Ny + 1)]
            a[q, p] ← Intg(f, Nx, Ny, hx, hy)
    a
UxZ :=
    for p ∈ 0 .. N
        for i ∈ 0 .. Nx
            for j ∈ 0 .. Ny
                f[i, j] ← Ux[i, j]*Z[i, j + p*(Ny + 1)]
        a[p] ← Intg(f, Nx, Ny, hx, hy)
    a
UyZ :=
    for p ∈ 0 .. N
        for i ∈ 0 .. Nx
            for j ∈ 0 .. Ny
                f[i, j] ← Uy[i, j]*Z[i, j + p*(Ny + 1)]
        a[p] ← Intg(f, Nx, Ny, hx, hy)
    a
χ :=
    for r ∈ 0 .. N
        for q ∈ 0 .. N
            for p ∈ 0 .. N
                for i ∈ 0 .. Nx
                    for j ∈ 0 .. Ny
                        f[i, j] ← (Z2y[i, j + r*(Ny + 1)]*Zx[i, j + q*(Ny + 1)] - Z2x[i, j + r*(Ny + 1)]*Zy[i, j + q*(Ny + 1)])*Z[i, j + p*(Ny + 1)]
                a[q, p + r*(N + 1)] ← Intg(f, Nx, Ny, hx, hy)
    a
ξ :=
    for r ∈ 0 .. N
        for p ∈ 0 .. N
            for i ∈ 0 .. Nx
                for j ∈ 0 .. Ny
                    f[i, j] ← (Z2y[i, j + r*(Ny + 1)]*Ux[i, j] - Z2x[i, j + r*(Ny + 1)]*Uy[i, j])*Z[i, j + p*(Ny + 1)]
            b[p + r*(N + 1)] ← Intg(f, Nx, Ny, hx, hy)
    b
A1 :=
    for q ∈ 0 .. N
        for p ∈ 0 .. N
            for i ∈ 0 .. Nx
                for j ∈ 0 .. Ny
                    f[i, j] ← ΔZ1[i, j + q*(Ny + 1)]*Z[i, j + p*(Ny + 1)]
            a[q, p] ← Intg(f, Nx, Ny, hx, hy)
    a
χ1 :=
    for r ∈ 0 .. N
        for q ∈ 0 .. N
            for p ∈ 0 .. N
                for i ∈ 0 .. Nx
                    for j ∈ 0 .. Ny
                        f[i, j] ← (Z2y[i, j + r*(Ny + 1)]*Z1x[i, j + q*(Ny + 1)] - Z2x[i, j + r*(Ny + 1)]*Z1y[i, j + q*(Ny + 1)])*Z[i, j + p*(Ny + 1)]
                a[q, p + r*(N + 1)] ← Intg(f, Nx, Ny, hx, hy)
    a
ZZ :=
    for q ∈ 0 .. N
        for p ∈ 0 .. N
            for i ∈ 0 .. Nx
                for j ∈ 0 .. Ny
                    f[i, j] ← Z[i, j + q*(Ny + 1)]*Z[i, j + p*(Ny + 1)]
            a[q, p] ← Intg(f, Nx, Ny, hx, hy)
    a
Z1Z :=
    for q ∈ 0 .. N
        for p ∈ 0 .. N
            for i ∈ 0 .. Nx
                for j ∈ 0 .. Ny
                    f[i, j] ← Z1[i, j + q*(Ny + 1)]*Z[i, j + p*(Ny + 1)]
            a[q, p] ← Intg(f, Nx, Ny, hx, hy)
    a
Pr := 0.71
Ra := 1*10^5
Gr := Ra/Pr
W0(K) :=
    for q ∈ 0 .. N
        E[q] ← 0
    for k ∈ 1 .. K
        for p ∈ 0 .. N
            B'[p] ← sum(E[r]*ξ[p + r*(N + 1)], r = 0 .. N)
            for q ∈ 0 .. N
                A'[p, q] ← -sum(E[r]*χ[q, p + r*(N + 1)], r = 0 .. N)
        C ← lsolve(1/Pr*A + A', 1/Pr*B + B')
        for p ∈ 0 .. N
            B1[p] ← -Gr*(sum(C[r]*ZxZ[r, p], r = 0 .. N) + UxZ[p])
            for q ∈ 0 .. N
                A1'[p, q] ← -sum(E[r]*χ1[q, p + r*(N + 1)], r = 0 .. N)
        E ← -lsolve(A1 + A1', B1)
    C + 1i*E
W(K, Δτ) :=
    for q ∈ 0 .. N
        C[q] ← 0
        D[q] ← 0
        E[q] ← 0
    for k ∈ 1 .. K
        for p ∈ 0 .. N
            B'[p] ← sum(E[r]*ξ[p + r*(N + 1)], r = 0 .. N) - 1/Δτ*sum(C[r]*ZZ[r, p], r = 0 .. N)
            for q ∈ 0 .. N
                A'[p, q] ← -sum(E[r]*χ[q, p + r*(N + 1)], r = 0 .. N) - 1/Δτ*ZZ[q, p]
        C ← lsolve(1/Pr*A + A', 1/Pr*B + B')
        for p ∈ 0 .. N
            B1[p] ← -Gr*(sum(C[r]*ZxZ[r, p], r = 0 .. N) + UxZ[p]) - 1/Δτ*sum(D[r]*Z1Z[r, p], r = 0 .. N)
            for q ∈ 0 .. N
                A1'[p, q] ← -sum(E[r]*χ1[q, p + r*(N + 1)], r = 0 .. N) - 1/Δτ*Z1Z[q, p]
        D ← lsolve(A1 + A1', B1)
        E ← -D
    C + 1i*E
K := 10
Δt := 1000
ν := 3.2*10^-5
Δτ := ν/L^2*Δt
Δτ =  # no stored result
w := W(K, Δτ)
w1 := Re(w)
w2 := Im(w)
w0 := W0(20)
w01 := Re(w0)
w02 := Im(w0)
θc[i, j] := (sum(w1[q]*Z[i, j + q*(Ny + 1)], q) + U[i, j])*(T_H - T_C) + T_C
Ψ[i, j] := sum(w2[q]*Z2[i, j + q*(Ny + 1)], q)
u[i, j] := sum(w2[q]*Z2y[i, j + q*(Ny + 1)], q)
v[i, j] := -sum(w2[q]*Z2x[i, j + q*(Ny + 1)], q)
θ0[i, j] := (sum(w01[q]*Z[i, j + q*(Ny + 1)], q) + U[i, j])*(T_H - T_C) + T_C
Ζ[i, j] := -sum(w2[q]*Z1[i, j + q*(Ny + 1)], q)
# [component: inputs θ0]
# [component: inputs Ψ]
