# R-operators
V(x, y) := x + y + sqrt(x^2 + y^2)
Λ(x, y) := -V(-x, -y)
band(a, x) := 1/(2*a)*(a^2 - x^2)
line(a, b, c, x, y) := (a*x + b*y + c)/sqrt(a^2 + b^2)
# Geometry
L := 1
H := L
L' := L/L
H' := H/L
ω_H(X, Y) := X + L'/2
ω_C(X, Y) := L'/2 - X
# (dimensionless)
ω1(X, Y) := band(L'/2, X)
ω2(X, Y) := band(H'/2, Y)
ω(X, Y) := Λ(ω1(X, Y), ω2(X, Y))
a := 1
b := 1
ω_1(x, y) := x + a
ω_2(x, y) := y + b
ω_3(x, y) := a - x
ω_4(x, y) := b - y
ω_12(x, y) := Λ(ω_1(x, y), ω_2(x, y))
ω_34(x, y) := Λ(ω_3(x, y), ω_4(x, y))
ω(x, y) := Λ(ω_12(x, y), ω_34(x, y))
# Physical parameters
T_C := 0
T_H := 1
Pr := 0.71
Ra := 1*10^3
Gr := Ra/Pr
f_1 := T_H
f_2 := T_C
# Visualization mesh
Nx := 128
hx := L'/Nx
i := 0 .. Nx
X[i] := -a + 2*a/Nx*i
F(x, y) := (f_2*ω_12(x, y) + f_1*ω_34(x, y))/(ω_12(x, y) + ω_34(x, y))
Ny := Nx
hy := H'/Ny
j := 0 .. Ny
Y[j] := -b + 2*b/Ny*j
w12[i, j] := ω_12(X[i], Y[j])
w34[i, j] := ω_34(X[i], Y[j])
w[i, j] := ω(X[i], Y[j])
Φ[i, j] := ω(X[i], Y[j])
f[i, j] := 2*(X[i]^2 + Y[i]^2 - a^2 - b^2)
Ω[i, j] := w[i, j]*Φ[i, j]
f[i, j] := if(|w12[i, j]| + |w34[i, j]| == 0, (f_1 + f_2)/2, Φ[i, j])
# [component: inputs w]
# [component: inputs f]
# [component: inputs vectorize(w*f)]
# [component: inputs f]
# -----------------------------------------------------------------------------------------------------------------------------------------------------------------
# Basic functions
# 2D multyindex
M := 5
N := (M^2 + 3*M)/2
q := 0 .. N
s := 0 .. N
p := 0 .. N
r := 0 .. N
J1[q] := ceil((sqrt(2 + 8*q) - 3)/2)
J[q] := q - J1[q]*(J1[q] + 1)/2
I[q] := J1[q] - J[q]
Po(q, x, y) := x^I[q]*y^J[q]
Q(q, X, Y) := ω(X, Y)*Po(q, X, Y)
Q2(q, X, Y) := ω(X, Y)^2*Po(q, X, Y)
# Basis functions
PoVect[i, j] := Q(15, X[i], Y[j])
N = 20
# [component: inputs PoVect]
# [component: inputs PoVect]
# Laplace operator
Δx := 0.001*L'
Δy := 0.001*H'
Q_x(Q, q, x, y, Δx) := (Q(q, x + Δx, y) - Q(q, x - Δx, y))/(2*Δx)
Q_y(Q, q, x, y, Δy) := (Q(q, x, y + Δy) - Q(q, x, y - Δy))/(2*Δy)
ΔQ(Q, q, x, y, Δx, Δy) := (Q(q, x + Δx, y) + Q(q, x - Δx, y))/Δx^2 + (Q(q, x, y + Δy) + Q(q, x, y - Δy))/Δy^2 - 2*(1/Δx^2 + 1/Δy^2)*Q(q, x, y)
Q1(q, X, Y) := ΔQ(Q2, q, X, Y, Δx, Δy)
Δf(f, x, y, Δx, Δy) := (f(x + Δx, y) + f(x - Δx, y))/Δx^2 + (f(x, y + Δy) + f(x, y - Δy))/Δy^2 - 2*(1/Δx^2 + 1/Δy^2)*f(x, y)
P[i, j] := w[i, j]*Δf(F, X[i], Y[j], Δx, Δy)
U[i, j] := w[i, j]*f[i, j]
f_x(f, x, y, Δx) := (f(x + Δx, y) - f(x - Δx, y))/(2*Δx)
f_y(f, x, y, Δy) := (f(x, y + Δy) - f(x, y - Δy))/(2*Δy)
Ux[i, j] := w[i, j]*f_x(F, X[i], Y[j], Δx)
Uy[i, j] := w[i, j]*f_y(F, X[i], Y[j], Δy)
Q(q, X, Y) := Q_(q, X, Y) - ω1(X, Y)*ω2(X, Y)/(ω1(X, Y) + ω2(X, Y))*(Q_x(Q_, q, X, Y, Δx)*f_x(ω2, X, Y, Δx) + Q_y(Q_, q, X, Y, Δx)*f_y(ω2, X, Y, Δy))  # disabled
# 2D integration
Intg(f, Nx, Ny, hx, hy) := 2*hx*hy/3*sum(sum(f[2*i, 2*j + 1] + f[2*i + 2, 2*j + 1] + f[2*i + 1, 2*j] + f[2*i + 1, 2*j + 2] + 2*f[2*i + 1, 2*j + 1], j = 0 .. floor(Ny*2^-1) - 1), i = 0 .. floor(Nx*2^-1) - 1)
# Poisson Euation Test Problem
Z :=
    for i ∈ 0 .. Nx
        for j ∈ 0 .. Ny
            z0[i, j] ← w[i, j]*Q(0, X[i], Y[j])
    for q ∈ 1 .. N
        for i ∈ 0 .. Nx
            for j ∈ 0 .. Ny
                z[i, j] ← w[i, j]*Q(q, X[i], Y[j])
        z0 ← augment(z0, z)
    z0
ΔZ :=
    for i ∈ 0 .. Nx
        for j ∈ 0 .. Ny
            z0[i, j] ← w[i, j]*ΔQ(Q, 0, X[i], Y[j], Δx, Δy)
    for q ∈ 1 .. N
        for i ∈ 0 .. Nx
            for j ∈ 0 .. Ny
                z[i, j] ← w[i, j]*ΔQ(Q, q, X[i], Y[j], Δx, Δy)
        z0 ← augment(z0, z)
    z0
MA :=
    for q ∈ 0 .. N
        for s ∈ 0 .. N
            for i ∈ 0 .. Nx
                for j ∈ 0 .. Ny
                    f[i, j] ← ΔZ[i, j + q*(Ny + 1)]*Z[i, j + s*(Ny + 1)]
            a[q, s] ← Intg(f, Nx, Ny, hx, hy)
    a
B :=
    for q ∈ 0 .. N
        for i ∈ 0 .. Nx
            for j ∈ 0 .. Ny
                f[i, j] ← Z[i, j + q*(Ny + 1)]*P[i, j]
        b[q] ← Intg(f, Nx, Ny, hx, hy)
    -b
h := lsolve(MA, B)
θ[i, j] := sum(h[q]*Z[i, j + q*(Ny + 1)], q) + f[i, j]
# [component: inputs θ]
MA = [
    -0.0132698, 0, 0, -0.00237045, 6.19218e-7, -0.00237045, 0, 0, 0, 0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;
    0, -0.00401739, 6.19218e-7, 0, 0, 0, -0.00149133, 4.14272e-7, -0.000675818, 3.22651e-7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;
    0, 6.19218e-7, -0.00401739, 0, 0, 0, 3.22651e-7, -0.000675818, 4.14272e-7, -0.00149133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;
    0.00092343, 0, 0, -0.00129006, 3.22651e-7, -7.20323e-5, 0, 0, 0, 0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;
    6.19217e-7, 0, 0, 4.14272e-7, -0.00087708, 4.14272e-7, 0, 0, 0, 0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;
    0.00092343, 0, 0, -7.20323e-5, 3.22651e-7, -0.00129006, 0, 0, 0, 0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;
    0, -0.000283756, 4.77869e-8, 0, 0, 0, -0.000601819, 2.34043e-7, -0.000111708, -9.88405e-9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;
    0, 3.2265e-7, -0.000273294, 0, 0, 0, 2.95707e-7, -0.000303937, 1.13444e-7, -0.000159071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;
    0, -0.000273294, 3.2265e-7, 0, 0, 0, -0.000159071, 1.13444e-7, -0.000303937, 2.95707e-7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;
    0, 4.77869e-8, -0.000283756, 0, 0, 0, -9.88405e-9, -0.000111708, 2.34043e-7, -0.000601819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;
    0.0015276, 0, 0, -0.000200825, 1.10714e-7, 0.000131191, 0, 0, 0, 0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;
    4.77862e-8, 0, 0, 2.34042e-7, -0.000168993, 2.09472e-8, 0, 0, 0, 0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;
    0.000330492, 0, 0, -0.000132082, 8.26114e-8, -0.000132082, 0, 0, 0, 0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;
    4.77862e-8, 0, 0, 2.09472e-8, -0.000168993, 2.34042e-7, 0, 0, 0, 0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;
    0.0015276, 0, 0, 0.000131191, 1.10714e-7, -0.000200825, 0, 0, 0, 0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;
    0, 0.000429308, -7.42795e-8, 0, 0, 0, -0.00012777, 9.87699e-8, 2.40211e-5, -3.63525e-8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;
    0, 1.10713e-7, 7.39063e-5, 0, 0, 0, 1.72148e-7, -8.89145e-5, 2.92096e-8, -8.54264e-6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;
    0, 2.86187e-6, -9.88571e-9, 0, 0, 0, -7.94357e-5, 4.84584e-8, -7.4408e-5, 2.1394e-8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;
    0, -9.88571e-9, 2.86187e-6, 0, 0, 0, 2.1394e-8, -7.4408e-5, 4.84584e-8, -7.94357e-5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;
    0, 7.39063e-5, 1.10713e-7, 0, 0, 0, -8.54264e-6, 2.92096e-8, -8.89145e-5, 1.72148e-7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;
    0, -7.42795e-8, 0.000429308, 0, 0, 0, -3.63525e-8, 2.40211e-5, 9.87699e-8, -0.00012777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]
# Checking
ΔΘ :=
    for i ∈ 0 .. Nx
        for j ∈ 0 .. Ny
            z0[i, j] ← ΔQ(θ[i, j], 0, X[i], Y[j], Δx, Δy)
    z0
N = 20
