# R-operators
V(x, y) := x + y + sqrt(x^2 + y^2)
Λ(x, y) := -V(-x, -y)
band(a, x) := 1/(2*a)*(a^2 - x^2)
line(a, b, c, x, y) := (a*x + b*y + c)/sqrt(a^2 + b^2)
# Geometry
L := 1
H := L
L' := L/L
H' := H/L
ω_H(X, Y) := X + L'/2
ω_C(X, Y) := L'/2 - X
# (dimensionless)
ω1(X, Y) := band(L'/2, X)
ω2(X, Y) := band(H'/2, Y)
ω(X, Y) := Λ(ω1(X, Y), ω2(X, Y))
a := 5
b := 1
ω_1(x, y) := x + a
ω_2(x, y) := y + b
ω_3(x, y) := a - x
ω_4(x, y) := b - y
ω_12(x, y) := Λ(ω_1(x, y), ω_2(x, y))
ω_34(x, y) := Λ(ω_3(x, y), ω_4(x, y))
ω(x, y) := Λ(ω_12(x, y), ω_34(x, y))
# Physical parameters
T_C := 0
T_H := 1
Pr := 0.71
Ra := 1*10^3
Gr := Ra/Pr
f_1 := T_H
f_2 := T_C
# Visualization mesh
Nx := 128
hx := L'/Nx
i := 0 .. Nx
X[i] := -a + 2*a/Nx*i
F(x, y) := (f_2*ω_12(x, y) + f_1*ω_34(x, y))/(ω_12(x, y) + ω_34(x, y))
Ny := Nx
hy := H'/Ny
j := 0 .. Ny
Y[j] := -b + 2*b/Ny*j
w12[i, j] := ω_12(X[i], Y[j])
w34[i, j] := ω_34(X[i], Y[j])
w[i, j] := ω(X[i], Y[j])
Φ[i, j] := ω(X[i], Y[j])
Ω[i, j] := w[i, j]*Φ[i, j]
f[i, j] := if(|w12[i, j]| + |w34[i, j]| == 0, (f_1 + f_2)/2, Φ[i, j])
f[i, j] := 2*exp(X[i] + Y[j])*(2*X[i]*(Y[i]^2 - 1) + X[i]^2*Y[j]*(2 + Y[j]) - 1 - 2*Y[j])
# [component: inputs w]
# [component: inputs f]
# [component: inputs vectorize(w*f)]
# [component: inputs f]
# -----------------------------------------------------------------------------------------------------------------------------------------------------------------
# Basic functions
# 2D multyindex
M := 5
N := (M^2 + 3*M)/2
q := 0 .. N
s := 0 .. N
p := 0 .. N
r := 0 .. N
J1[q] := ceil((sqrt(2 + 8*q) - 3)/2)
J[q] := q - J1[q]*(J1[q] + 1)/2
I[q] := J1[q] - J[q]
Po(q, x, y) := x^I[q]*y^J[q]
Q(q, X, Y) := ω(X, Y)*Po(q, X, Y)
Q2(q, X, Y) := ω(X, Y)^2*Po(q, X, Y)
# Basis functions
PoVect[i, j] := Q(11, X[i], Y[j])
N = 20
# [component: inputs PoVect]
# [component: inputs PoVect]
# Laplace operator
Δx := 0.001*L'
Δy := 0.001*H'
Q_x(Q, q, x, y, Δx) := (Q(q, x + Δx, y) - Q(q, x - Δx, y))/(2*Δx)
Q_y(Q, q, x, y, Δy) := (Q(q, x, y + Δy) - Q(q, x, y - Δy))/(2*Δy)
ΔQ(Q, q, x, y, Δx, Δy) := (Q(q, x + Δx, y) + Q(q, x - Δx, y))/Δx^2 + (Q(q, x, y + Δy) + Q(q, x, y - Δy))/Δy^2 - 2*(1/Δx^2 + 1/Δy^2)*Q(q, x, y)
Q1(q, X, Y) := ΔQ(Q2, q, X, Y, Δx, Δy)
Δf(f, x, y, Δx, Δy) := (f(x + Δx, y) + f(x - Δx, y))/Δx^2 + (f(x, y + Δy) + f(x, y - Δy))/Δy^2 - 2*(1/Δx^2 + 1/Δy^2)*f(x, y)
P[i, j] := w[i, j]*Δf(F, X[i], Y[j], Δx, Δy)
U[i, j] := w[i, j]*f[i, j]
f_x(f, x, y, Δx) := (f(x + Δx, y) - f(x - Δx, y))/(2*Δx)
f_y(f, x, y, Δy) := (f(x, y + Δy) - f(x, y - Δy))/(2*Δy)
Ux[i, j] := w[i, j]*f_x(F, X[i], Y[j], Δx)
Uy[i, j] := w[i, j]*f_y(F, X[i], Y[j], Δy)
Q(q, X, Y) := Q_(q, X, Y) - ω1(X, Y)*ω2(X, Y)/(ω1(X, Y) + ω2(X, Y))*(Q_x(Q_, q, X, Y, Δx)*f_x(ω2, X, Y, Δx) + Q_y(Q_, q, X, Y, Δx)*f_y(ω2, X, Y, Δy))  # disabled
# 2D integration
Intg(f, Nx, Ny, hx, hy) := 2*hx*hy/3*sum(sum(f[2*i, 2*j + 1] + f[2*i + 2, 2*j + 1] + f[2*i + 1, 2*j] + f[2*i + 1, 2*j + 2] + 2*f[2*i + 1, 2*j + 1], j = 0 .. floor(Ny*2^-1) - 1), i = 0 .. floor(Nx*2^-1) - 1)
# Poisson Euation Test Problem
Z :=
    for i ∈ 0 .. Nx
        for j ∈ 0 .. Ny
            z0[i, j] ← w[i, j]*Q(0, X[i], Y[j])
    for q ∈ 1 .. N
        for i ∈ 0 .. Nx
            for j ∈ 0 .. Ny
                z[i, j] ← w[i, j]*Q(q, X[i], Y[j])
        z0 ← augment(z0, z)
    z0
ΔZ :=
    for i ∈ 0 .. Nx
        for j ∈ 0 .. Ny
            z0[i, j] ← w[i, j]*ΔQ(Q, 0, X[i], Y[j], Δx, Δy)
    for q ∈ 1 .. N
        for i ∈ 0 .. Nx
            for j ∈ 0 .. Ny
                z[i, j] ← w[i, j]*ΔQ(Q, q, X[i], Y[j], Δx, Δy)
        z0 ← augment(z0, z)
    z0
MA :=
    for q ∈ 0 .. N
        for s ∈ 0 .. N
            for i ∈ 0 .. Nx
                for j ∈ 0 .. Ny
                    f[i, j] ← ΔZ[i, j + q*(Ny + 1)]*Z[i, j + s*(Ny + 1)]
            a[q, s] ← Intg(f, Nx, Ny, hx, hy)
    a
B :=
    for q ∈ 0 .. N
        for i ∈ 0 .. Nx
            for j ∈ 0 .. Ny
                f[i, j] ← Z[i, j + q*(Ny + 1)]*P[i, j]
        b[q] ← Intg(f, Nx, Ny, hx, hy)
    -b
h := lsolve(MA, B)
θ[i, j] := sum(h[q]*Z[i, j + q*(Ny + 1)], q) + f[i, j]
# [component: inputs θ]
# [component: inputs U]
# [component: inputs f]
Z :=
    for i ∈ 0 .. Nx
        for j ∈ 0 .. Ny
            z0[i, j] ← w[i, j]*Q(0, X[i], Y[j])
    for q ∈ 1 .. N
        for i ∈ 0 .. Nx
            for j ∈ 0 .. Ny
                z[i, j] ← w[i, j]*Q(q, X[i], Y[j])
        z0 ← augment(z0, z)
    z0
ΔZ :=
    for i ∈ 0 .. Nx
        for j ∈ 0 .. Ny
            z0[i, j] ← w[i, j]*ΔQ(Q, 0, X[i], Y[j], Δx, Δy)
    for q ∈ 1 .. N
        for i ∈ 0 .. Nx
            for j ∈ 0 .. Ny
                z[i, j] ← w[i, j]*ΔQ(Q, q, X[i], Y[j], Δx, Δy)
        z0 ← augment(z0, z)
    z0
MA :=
    for q ∈ 0 .. N
        for s ∈ 0 .. N
            for i ∈ 0 .. Nx
                for j ∈ 0 .. Ny
                    f[i, j] ← ΔZ[i, j + q*(Ny + 1)]*Z[i, j + s*(Ny + 1)]
            a[q, s] ← Intg(f, Nx, Ny, hx, hy)
    1/Pr*a
B :=
    for q ∈ 0 .. N
        for i ∈ 0 .. Nx
            for j ∈ 0 .. Ny
                f[i, j] ← Z[i, j + q*(Ny + 1)]*P[i, j]
        b[q] ← Intg(f, Nx, Ny, hx, hy)
    -1/Pr*b
h := lsolve(MA, B)
θ[i, j] := sum(h[q]*Z[i, j + q*(Ny + 1)], q) + f[i, j]
# [component: inputs θ]
Zx :=
    for i ∈ 0 .. Nx
        for j ∈ 0 .. Ny
            z0[i, j] ← w[i, j]*Q_x(Q, 0, X[i], Y[j], Δx)
    for q ∈ 1 .. N
        for i ∈ 0 .. Nx
            for j ∈ 0 .. Ny
                z[i, j] ← w[i, j]*Q_x(Q, q, X[i], Y[j], Δx)
        z0 ← augment(z0, z)
    z0
Zy :=
    for i ∈ 0 .. Nx
        for j ∈ 0 .. Ny
            z0[i, j] ← w[i, j]*Q_y(Q, 0, X[i], Y[j], Δy)
    for q ∈ 1 .. N
        for i ∈ 0 .. Nx
            for j ∈ 0 .. Ny
                z[i, j] ← w[i, j]*Q_y(Q, q, X[i], Y[j], Δy)
        z0 ← augment(z0, z)
    z0
N =  # no stored result
MA =  # no stored result
B =  # no stored result
Z1 :=
    for i ∈ 0 .. Nx
        for j ∈ 0 .. Ny
            z0[i, j] ← w[i, j]*Q1(0, X[i], Y[j])
    for q ∈ 1 .. N
        for i ∈ 0 .. Nx
            for j ∈ 0 .. Ny
                z[i, j] ← w[i, j]*Q1(q, X[i], Y[j])
        z0 ← augment(z0, z)
    z0
ΔZ1 :=
    for i ∈ 0 .. Nx
        for j ∈ 0 .. Ny
            z0[i, j] ← w[i, j]*ΔQ(Q1, 0, X[i], Y[j], Δx, Δy)
    for q ∈ 1 .. N
        for i ∈ 0 .. Nx
            for j ∈ 0 .. Ny
                z[i, j] ← w[i, j]*ΔQ(Q1, q, X[i], Y[j], Δx, Δy)
        z0 ← augment(z0, z)
    z0
Z2 :=
    for i ∈ 0 .. Nx
        for j ∈ 0 .. Ny
            z0[i, j] ← w[i, j]*Q2(0, X[i], Y[j])
    for q ∈ 1 .. N
        for i ∈ 0 .. Nx
            for j ∈ 0 .. Ny
                z[i, j] ← w[i, j]*Q2(q, X[i], Y[j])
        z0 ← augment(z0, z)
    z0
Z1x :=
    for i ∈ 0 .. Nx
        for j ∈ 0 .. Ny
            z0[i, j] ← w[i, j]*Q_x(Q1, 0, X[i], Y[j], Δx)
    for q ∈ 1 .. N
        for i ∈ 0 .. Nx
            for j ∈ 0 .. Ny
                z[i, j] ← w[i, j]*Q_x(Q1, q, X[i], Y[j], Δx)
        z0 ← augment(z0, z)
    z0
Z1y :=
    for i ∈ 0 .. Nx
        for j ∈ 0 .. Ny
            z0[i, j] ← w[i, j]*Q_y(Q1, 0, X[i], Y[j], Δy)
    for q ∈ 1 .. N
        for i ∈ 0 .. Nx
            for j ∈ 0 .. Ny
                z[i, j] ← w[i, j]*Q_y(Q1, q, X[i], Y[j], Δy)
        z0 ← augment(z0, z)
    z0
Z2x :=
    for i ∈ 0 .. Nx
        for j ∈ 0 .. Ny
            z0[i, j] ← w[i, j]*Q_x(Q2, 0, X[i], Y[j], Δx)
    for q ∈ 1 .. N
        for i ∈ 0 .. Nx
            for j ∈ 0 .. Ny
                z[i, j] ← w[i, j]*Q_x(Q2, q, X[i], Y[j], Δx)
        z0 ← augment(z0, z)
    z0
Z2y :=
    for i ∈ 0 .. Nx
        for j ∈ 0 .. Ny
            z0[i, j] ← w[i, j]*Q_y(Q2, 0, X[i], Y[j], Δy)
    for q ∈ 1 .. N
        for i ∈ 0 .. Nx
            for j ∈ 0 .. Ny
                z[i, j] ← w[i, j]*Q_y(Q2, q, X[i], Y[j], Δy)
        z0 ← augment(z0, z)
    z0
ZxZ :=
    for q ∈ 0 .. N
        for p ∈ 0 .. N
            for i ∈ 0 .. Nx
                for j ∈ 0 .. Ny
                    f[i, j] ← Zx[i, j + q*(Ny + 1)]*Z[i, j + p*(Ny + 1)]
            a[q, p] ← Intg(f, Nx, Ny, hx, hy)
    a
ZyZ :=
    for q ∈ 0 .. N
        for p ∈ 0 .. N
            for i ∈ 0 .. Nx
                for j ∈ 0 .. Ny
                    f[i, j] ← Zy[i, j + q*(Ny + 1)]*Z[i, j + p*(Ny + 1)]
            a[q, p] ← Intg(f, Nx, Ny, hx, hy)
    a
χ :=
    for r ∈ 0 .. N
        for q ∈ 0 .. N
            for p ∈ 0 .. N
                for i ∈ 0 .. Nx
                    for j ∈ 0 .. Ny
                        f[i, j] ← (Z2y[i, j + r*(Ny + 1)]*Zx[i, j + q*(Ny + 1)] - Z2x[i, j + r*(Ny + 1)]*Zy[i, j + q*(Ny + 1)])*Z[i, j + p*(Ny + 1)]
                a[q, p + r*(N + 1)] ← Intg(f, Nx, Ny, hx, hy)
    a
UxZ :=
    for p ∈ 0 .. N
        for i ∈ 0 .. Nx
            for j ∈ 0 .. Ny
                f[i, j] ← Ux[i, j]*Z[i, j + p*(Ny + 1)]
        a[p] ← Intg(f, Nx, Ny, hx, hy)
    a
UyZ :=
    for p ∈ 0 .. N
        for i ∈ 0 .. Nx
            for j ∈ 0 .. Ny
                f[i, j] ← Uy[i, j]*Z[i, j + p*(Ny + 1)]
        a[p] ← Intg(f, Nx, Ny, hx, hy)
    a
χ1 :=
    for r ∈ 0 .. N
        for q ∈ 0 .. N
            for p ∈ 0 .. N
                for i ∈ 0 .. Nx
                    for j ∈ 0 .. Ny
                        f[i, j] ← (Z2y[i, j + r*(Ny + 1)]*Z1x[i, j + q*(Ny + 1)] - Z2x[i, j + r*(Ny + 1)]*Z1y[i, j + q*(Ny + 1)])*Z[i, j + p*(Ny + 1)]
                a[q, p + r*(N + 1)] ← Intg(f, Nx, Ny, hx, hy)
    a
ξ :=
    for r ∈ 0 .. N
        for p ∈ 0 .. N
            for i ∈ 0 .. Nx
                for j ∈ 0 .. Ny
                    f[i, j] ← (Z2y[i, j + r*(Ny + 1)]*Ux[i, j] - Z2x[i, j + r*(Ny + 1)]*Uy[i, j])*Z[i, j + p*(Ny + 1)]
            b[p + r*(N + 1)] ← Intg(f, Nx, Ny, hx, hy)
    b
A1 :=
    for q ∈ 0 .. N
        for p ∈ 0 .. N
            for i ∈ 0 .. Nx
                for j ∈ 0 .. Ny
                    f[i, j] ← ΔZ1[i, j + q*(Ny + 1)]*Z[i, j + p*(Ny + 1)]
            a[q, p] ← Intg(f, Nx, Ny, hx, hy)
    a
ZZ :=
    for q ∈ 0 .. N
        for p ∈ 0 .. N
            for i ∈ 0 .. Nx
                for j ∈ 0 .. Ny
                    f[i, j] ← Z[i, j + q*(Ny + 1)]*Z[i, j + p*(Ny + 1)]
            a[q, p] ← Intg(f, Nx, Ny, hx, hy)
    a
Z1Z :=
    for q ∈ 0 .. N
        for p ∈ 0 .. N
            for i ∈ 0 .. Nx
                for j ∈ 0 .. Ny
                    f[i, j] ← Z1[i, j + q*(Ny + 1)]*Z[i, j + p*(Ny + 1)]
            a[q, p] ← Intg(f, Nx, Ny, hx, hy)
    a
W(K, α, Δτ) :=
    for q ∈ 0 .. N
        C[q] ← 0
        D[q] ← 0
        E[q] ← 0
    for k ∈ 1 .. K
        for p ∈ 0 .. N
            B'[p] ← -sum(E[r]*ξ[p + r*(N + 1)], r = 0 .. N) - 1/Δτ*sum(C[r]*ZZ[r, p], r = 0 .. N)
            for q ∈ 0 .. N
                A'[q, p] ← -sum(E[r]*χ[q, p + r*(N + 1)], r = 0 .. N) - 1/Δτ*ZZ[q, p]
        C ← lsolve(A + A', B + B')
        for p ∈ 0 .. N
            B1[p] ← -Gr*10*((sum(C[r]*ZxZ[r, p], r = 0 .. N) + UxZ[p])*cos(α) + (sum(C[r]*ZyZ[r, p], r = 0 .. N) + UyZ[p])*sin(α)) - 1/Δτ*sum(D[r]*Z1Z[r, p], r = 0 .. N)
            for q ∈ 0 .. N
                A1'[q, p] ← -sum(E[r]*χ1[q, p + r*(N + 1)], r = 0 .. N) - 1/Δτ*Z1Z[q, p]
        D ← lsolve(A1 + A1', -B1)
        E ← -D
    C + 1i*E
W0(K, α) :=
    for q ∈ 0 .. N
        C[q] ← 0
        D[q] ← 0
        E[q] ← 0
    for k ∈ 1 .. K
        for p ∈ 0 .. N
            B'[p] ← -sum(E[r]*ξ[p + r*(N + 1)], r = 0 .. N)
            for q ∈ 0 .. N
                A'[q, p] ← -sum(E[r]*χ[q, p + r*(N + 1)], r = 0 .. N)
        C ← lsolve(A + A', B + B')
        for p ∈ 0 .. N
            B1[p] ← -Gr*10*((sum(C[r]*ZxZ[r, p], r = 0 .. N) + UxZ[p])*cos(α) + (sum(C[r]*ZyZ[r, p], r = 0 .. N) + UyZ[p])*sin(α))
            for q ∈ 0 .. N
                A1'[q, p] ← -sum(E[r]*χ1[q, p + r*(N + 1)], r = 0 .. N)
        D ← lsolve(A1 + A1', -B1)
        E ← -D
    C + 1i*E
K := 10
Δt := 500*10
ν := 3.2*10^-5
Δτ := ν/L^2*Δt
Δτ = 0.16
α := 0
w := W(K, α, Δτ)
w1 := Re(w)
w2 := Im(w)
w0 := W0(20, α)
w01 := Re(w0)
w02 := Im(w0)
θc[i, j] := (sum(w1[q]*Z[i, j + q*(Ny + 1)], q) + U[i, j])*(T_H - T_C) + T_C
Ψ[i, j] := sum(w2[q]*Z2[i, j + q*(Ny + 1)], q)
u[i, j] := sum(w2[q]*Z2y[i, j + q*(Ny + 1)], q)
v[i, j] := -sum(w2[q]*Z2x[i, j + q*(Ny + 1)], q)
θ0[i, j] := (sum(w01[q]*Z[i, j + q*(Ny + 1)], q) + U[i, j])*(T_H - T_C) + T_C
Gr = 1408.45
Ra = 1000
# [component: inputs θ]
# [component: inputs θ0]
# [component: inputs θc]
# [component: inputs Ψ]
# [component: inputs Ψ]
# [component: inputs u]
# [component: inputs v]
